T := 3840
t := 0 .. T - 1
f := 0 .. T - 1
F := transpose([1, 5, 9, 13, 17, 21])
A := transpose([0.05, 0.1, 0.15, 0.2, 0.25, 0.30])  # Частоты (кГц) и амплитуды (В) составляющих спектра исходного сигнала
s[t] := sum(A[i]*cos(2*π*F[i]*t/T), i = 0 .. length(A) - 1)
S := 2*cfft(s)/sqrt(T)  # Форма и спектр передаваемого сигнала
Fd := 192
dt := 3840/Fd
Q := 4
τ := dt/Q  # Частота и период дискретизации, скважность и длительность импульса.
e[t] :=
    1 if mod(t, dt) < τ
    0 otherwise
E := 2*cfft(e)/sqrt(T)  # Форма и спектр сигнала-переносчика
sd1[t] := s[t]*e[t]
sd2[t] := sd1[floor(t/τ)*τ]  # Форма дискретизированного сигнала АИМ-1 и АИМ-2
# SD - спектр дискретизированого сигнала;
# следует изменять sd1 на sd2 и обратно в зависимости  от того, спектр АИМ-1 или АИМ-2 надо получить
SD := 2*cfft(sd1)/sqrt(T)
F[f] :=
    1 if -1 < f < 22
    0 otherwise
SF[f] := F[f]*SD[f]
sf := Re(icfft(SF))*sqrt(T)  # АЧХ фильтра приёмника, спектр и форма принятого сигнала
df := 0 .. length(A) - 1
Sp[df] := |SF[1 + 4*df]|
# 3840 на оси времени соответствует 1мс
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# f  - частота в кГц.
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# 1кГц  5кГц  9кГц  13кГц  17кГц  21кГц
# 1кГц  5кГц  9кГц  13кГц  17кГц  21кГц
Q*transpose(Sp) = [0.05, 0.1, 0.15, 0.2, 0.25, 0.3]
transpose(Sp) = [0.0125, 0.025, 0.0375, 0.05, 0.0625, 0.075]
transpose(A) = [0.05, 0.1, 0.15, 0.2, 0.25, 0.3]
