T := 1024
t := 0 .. T - 1
z := T/2 .. T - 1  # Параметры времени наблюдения за сигналом
f := 0 .. T - 1
A := transpose([0.05, 0.1, 0.15, 0.2, 0.25, 0.3, 0.])
F1 := 1
df := 1  # Параметры первичного сигнала
a[t] := sum(A[k]*cos(2*π*(k*df + F1)*t/T), k = 0 .. 6)
SpA := fft(a)/sqrt(256)
E := 1.9
fc1 := 32
fc2 := 45
fc3 := 58  # Параметры сигналов-переносчиков (амплитуда и частоты)
e1[t] := E*cos(2*π*fc1*t/T)
e2[t] := E*cos(2*π*fc2*t/T)
e3[t] := E*cos(2*π*fc3*t/T)
# Форма и спектр несущих сигналов
SpE1 := fft(e1)/sqrt(256)
SpE2 := fft(e2)/sqrt(256)
SpE3 := fft(e3)/sqrt(256)
s1[t] := (1 + (2*a)[t]/E)*e1[t]
s2[t] := (1 + (2*a)[t]/E)*e2[t]
s3[t] := (1 + (2*a)[t]/E)*e3[t]
# Форма и спектр канальных сигналов (АМ-ДБП)
SpS1 := fft(s1)/sqrt(256)
SpS2 := fft(s2)/sqrt(256)
SpS3 := fft(s3)/sqrt(256)
Fk1[f] :=
    sqrt(2) if f > (fc1 - (5*df + F1) - 1) and f < fc1 - F1 + 1
    0 otherwise
Fk2[f] :=
    sqrt(2) if f > (fc2 - (5*df + F1) - 1) and f < fc2 - F1 + 1
    0 otherwise  # Канальные фильтры
Fk3[f] :=
    sqrt(2) if f > (fc3 - (5*df + F1) - 1) and f < fc3 - F1 + 1
    0 otherwise
SpS1[z] := 0
SpS2[z] := 0
SpS3[z] := 0
SpS11[f] := SpS1[f]*Fk1[f]
SpS12[f] := SpS2[f]*Fk2[f]
# Спектр и форма канальных сигналов (АМ-ОБП)
s11 := Re(icfft(SpS11))*sqrt(T)
s12 := Re(icfft(SpS12))*sqrt(T)
SpS13[f] := SpS3[f]*Fk3[f]
s13 := Re(icfft(SpS13))*sqrt(T)
# [component: outputs Вид_модуляции]
# Выбор вида модуляции
SpSk1 :=
    SpS1 if Вид_модуляции == 1
    SpS11 if Вид_модуляции == 2
sk1 :=
    s1 if Вид_модуляции == 1
    s11 if Вид_модуляции == 2
SpSk2 :=
    SpS2 if Вид_модуляции == 1
    SpS12 if Вид_модуляции == 2
sk2 :=
    s2 if Вид_модуляции == 1
    s12 if Вид_модуляции == 2
SpSk3 :=
    SpS3 if Вид_модуляции == 1
    SpS13 if Вид_модуляции == 2
sk3 :=
    s3 if Вид_модуляции == 1
    s13 if Вид_модуляции == 2
# [component: outputs канал]
# Выбор номера канала для вывода графиков
SpS :=
    SpS1 if канал == 1
    SpS2 if канал == 2
    SpS3 if канал == 3
s :=
    s1 if канал == 1
    s2 if канал == 2
    s3 if канал == 3
SpSk :=
    SpSk1 if канал == 1
    SpSk2 if канал == 2
    SpSk3 if канал == 3
sk :=
    sk1 if канал == 1
    sk2 if канал == 2
    sk3 if канал == 3
Fk :=
    Fk1 if канал == 1
    Fk2 if канал == 2
    Fk3 if канал == 3
SpE :=
    SpE1 if канал == 1
    SpE2 if канал == 2
    SpE3 if канал == 3
e :=
    e1 if канал == 1
    e2 if канал == 2
    e3 if канал == 3
# 1024 на оси времени соответствует 1мс | f  - частота в кГц.
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# [component: outputs yn1]
# [component: outputs yn2]
# [component: outputs yn3]
# Подключение источников первичных сигналов
G := yn1*sk1 + yn2*sk2 + yn3*sk3
SpG := fft(G)/sqrt(256)  # Формирование группового сигнала на выходе передатчика
Channel := 43
l := 0 .. Channel - 1
h[l] := (0.5 + 0.01*rnd(13))/(l + 3)  # Формирование отклика канала
# [component: outputs ЛинейныеИскажения]
# [component: outputs НелинейныеИскажения]
# Выбор вида искажений
KL[f] := (10^(-(0.00*f + 0.1*sqrt(f))))
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SpG[z] := 0
SpGL[f] := SpG[f]*KL[f]
GL := Re(icfft(SpGL))*sqrt(T)
Gout :=
    G if ЛинейныеИскажения == 0
    GL if ЛинейныеИскажения == 1
Gout[t] :=
    Gout[t] if НелинейныеИскажения == 0
    0.3*Gout[t] + 0.1*Gout[t]^2 - 0.05*Gout[t]^3 if НелинейныеИскажения == 1
SpG := fft(Gout)/sqrt(256)
# Спектр группового сигнала ра входе приёмника
d1[t] := (1 + Gout[t]/E)*e1[t]
d2[t] := (1 + Gout[t]/E)*e2[t]
d3[t] := (1 + Gout[t]/E)*e3[t]  # Форма и спектры демодулированного группового сигнала на разных несущих
# АМ-ДБП
SpD1 := fft(d1)/sqrt(256)
SpD2 := fft(d2)/sqrt(256)
SpD3 := fft(d3)/sqrt(256)
SpG[z] := 0
SpG11[f] := SpG[f]*Fk1[f]
SpG12[f] := SpG[f]*Fk2[f]
SpG13[f] := SpG[f]*Fk3[f]  # АМ-ОБП
dk11 := Re(icfft(SpG11))*sqrt(T)
dk12 := Re(icfft(SpG12))*sqrt(T)
dk13 := Re(icfft(SpG13))*sqrt(T)
d11[t] := (0 + dk11[t]/E)*e1[t]
d12[t] := (0 + dk12[t]/E)*e2[t]
d13[t] := (0 + dk13[t]/E)*e3[t]
SpD11 := fft(d11)/sqrt(256)
SpD12 := fft(d12)/sqrt(256)
SpD13 := fft(d13)/sqrt(256)
SpD1 :=
    SpD1 if Вид_модуляции == 1
    SpD11 if Вид_модуляции == 2
d1 :=
    d1 if Вид_модуляции == 1
    d11 if Вид_модуляции == 2
SpD2 :=
    SpD2 if Вид_модуляции == 1
    SpD12 if Вид_модуляции == 2
d2 :=
    d2 if Вид_модуляции == 1
    d12 if Вид_модуляции == 2
SpD3 :=
    SpD3 if Вид_модуляции == 1
    SpD13 if Вид_модуляции == 2
d3 :=
    d3 if Вид_модуляции == 1
    d13 if Вид_модуляции == 2
Fn[f] :=
    1 if f > 0 and f < F1 + 5*df + 1
    0 otherwise  # Фильтр нижних частот
SpD1[z] := 0
SpD2[z] := 0
SpD3[z] := 0
SpF1[t] := Fn[t]*SpD1[t]
SpF2[t] := Fn[t]*SpD2[t]
SpF3[t] := Fn[t]*SpD3[t]
y1 := sqrt(T)*Re(icfft(SpF1))
y2 := sqrt(T)*Re(icfft(SpF2))
y3 := sqrt(T)*Re(icfft(SpF3))
# [component: outputs канал]
# Выбор номера канала для вывода графиков
SpD :=
    SpD1 if канал == 1
    SpD2 if канал == 2
    SpD3 if канал == 3
d :=
    d1 if канал == 1
    d2 if канал == 2
    d3 if канал == 3
SpF :=
    SpF1 if канал == 1
    SpF2 if канал == 2
    SpF3 if канал == 3
y :=
    y1 if канал == 1
    y2 if канал == 2
    y3 if канал == 3
Fk :=
    Fk1 if канал == 1
    Fk2 if канал == 2
    Fk3 if канал == 3
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SpoF[f] := |SpF[f]|
transpose(SpoF) = [
    0, 0.05, 0.1, 0.15, 0.2, 0.25, 0.3, 0, 0, 0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]
transpose(A) = [0.05, 0.1, 0.15, 0.2, 0.25, 0.3, 0]
