fверх := 2400
amin := 0
amax := 1.2
w(a) :=
    0 if a < amin
    1/(amax - amin) if amin ≤ a ≤ amax
    0 if amax < a
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f(a) :=
    0 if a < amin
    (a - amin)/(amax - amin) if amin ≤ a ≤ amax
    1 if amax < a
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M := 1/(amax - amin)*integral(a, a = amin .. amax)
M = 0.6
D := integral(a^2*w(a), a = -∞ .. ∞) - (amax + amin)^2/4
D = 0.120141
Ga(f) := D/(2*fверх)
G0 := Ga(f)
G0 = 2.50294e-5
f := Nan  # error: Эта переменная не определена.
Ga(f) :=
    0 if f < -fверх
    D/(2*fверх) if -fверх ≤ f ≤ fверх
    0 if fверх < f
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Ba(τ) := 2*G0*sin(2*π*fверх*τ)/(2*π*fверх*τ)
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Δa := 0.003
fd := 4800
L := 512
Pшк := Δa^2/12
Pшк = 7.5e-7
A := 10*log(G0/Pшк)
A = 15.2339
