G := 80  # В тоннах
p := 1.56
d := 0.05
R := 3300  # В минутах
# коэффициенты
Inv := 0.45
Iso := 0.55
Conv := 0.62
v := 3
koef := 1.5
Tnew := 1.3
new_koef := 0.4
loss_percent := 22
N := 75
S := G/(p*d) = 1025.64
S := 1000  # НУЖНО ОКРУГЛИТЬ ВРУЧНУЮ
r := sqrt(S/π) = 17.8412
r := round(r) = 18
l := 2*r = 36
G := 2.4
Giso := G*Iso = 1.32  # Изометрия
Ginv := G*5*Inv = 5.4  # Инверсия
Gconv := G*Conv/5 = 0.2976  # Конвекция
SHiso := Giso*0.15 = 0.198
SHinv := Ginv*0.03 = 0.162
SHconv := Gconv*0.8 = 0.23808
v := v*koef = 4.5  # Средняя скорость ветра
t := R/(60*v) = 12.2222
Tnew := Tnew*new_koef*60 = 31.2
danger := N*loss_percent/100 = 16.5
easy := danger*0.25 = 4.125
medium_and_hard := danger*0.4 = 6.6
death := danger*0.35 = 5.775
