tstart := 3
twork := 4
pstart := 5
kdown := 7
dcan := 5
tfinish := tstart + twork = 7
P1 := pstart*(1/tstart)^-0.4 = 7.75923
Kpk := 0.474
Kpn := 0.645
P10 := pstart*Kpk/Kpn = 3.67442
Daes := 1.7*(P10*tfinish - pstart*tstart) = 18.2256
Dpomesch := Daes/kdown = 2.60365
A := P1/dcan = 1.55185  # Если меньше 1 то по таблице, иначе
Tstay := (1/(1.7*A) + tstart^0.6)^1.7 = 4.15772
A := P1/(dcan*kdown) = 0.221692  # Это всегда по таблице = 12 часов время пребувания персонала и жителей населенного пункта в помещении
tk := tstart + 8 = 11
Pk := pstart*(tk/tstart)^-0.4 = 2.97346
Dobl := 1.7*(Pk*tk - pstart*tstart)/kdown = 4.30052
tk := tstart + 48 = 51
Pk := pstart*(tk/tstart)^-0.4 = 1.60987
Dobl := 1.7*(Pk*tk - pstart*tstart)/kdown = 16.2965
tk := tstart + 720 = 723
Pk := pstart*(tk/tstart)^-0.4 = 0.557395
Dobl := 1.7*(Pk*tk - pstart*tstart)/kdown = 94.2278
tk := tstart + 604800 = 604803
Pk := pstart*(tk/tstart)^-0.4 = 0.0377723
Dobl := 1.7*(Pk*tk - pstart*tstart)/kdown = 5544.37
