q := 50000000  # В килограммах
r := 2500  # В метрах
q := q/2
p := 105*nthroot(q, 3)/r + 410*nthroot(q^2, 3)/r^2 + 1370*q/r^3 = 20.0816
k := 0.1
q := q*2/10^6 = 50
r := r/1000 = 2.5
U := (74*q/r^2)*e^(-k*r) = 461.05
