r := 800  # В метрах
q := 100  # В тоннах
K := 0.014*r/nthroot(q, 3) = 2.41297
P := 233.3/(sqrt(1 + 29.8*K^3) - 1) = 11.9728
P := 22/(K*sqrt(log(K) + 0.158)) = 12.4009
# При K<2 | При K>2
q := q/1000
r := r/1000
U := (74*q/r^2)*e^(-0.1*r) = 10.6735
