F := 200
f := 48000
A := 0.505
h := 1000
k := f/F
D := round(A)
a := 2*1*π*k^-1
i := 0, h^-1 .. k
U(i) := A*sin(a*i)
B(i) := floor(i + h^-1)
Ud(i) := A*sin(a*B(i))
Uq(i) := floor(A*sin(a*B(i)) + 0.5)
Eq(i) := Uq(i) - Ud(i)
Eqef := sqrt(sum(Eq(i)^2, i)/(h*k))
Kg := (Eqef*100*sqrt(2))/A
k = 240
Kg = 99.7646
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