y := 31
x := 1
k := y/x
h := 100
Amax := 10
A := 0, 0.1 .. Amax
a := 2*π*x*y^-1
i := 0, h^-1 .. y
B(i) := floor(i + h^-1)
f := 48000
F := f/k
Eq(i, A) := floor(A*sin(a*floor(B(i))) + 0.5) - A*sin(a*floor(B(i)))
En := 1/sqrt(12)
Eqef(A) := sqrt(sum(Eq(i, A)^2, i)/(h*y))
Kg(A) := Eqef(A)*100*sqrt(2)/A
Kn(A) := En*100*sqrt(2)/A
En = 0.288675
F = 1548.39
k = 31
y = 31
x = 1
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