y := 7
x := 3
A := 7
fs := 48
F := fs*x/y = 20.5714
k := y/x = 2.33333
A := 7
v := 6
h := 1000
i := 0, h^-1 .. 2*y
a := 2*π*x*y^-1
j := 0, 1 .. 2*y
n(i) := 0
B(i) := floor(i + h^-1)
U(i) := A*sin(a*i)
Ud(j) := A*sin(a*j)
Udh(i) := A*sin(a*floor(B(i)))
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