v := 4.5
n := 40
dF := 0.5  # kHz
y := 0.1
fs := 48  # kHz
ny := dF/fs
h := 1000
i := 0, h^-1 .. v
j := ny, ny*2 .. n*ny
S(i) := |y*sin(π*y*i)/(π*y*i)|
S(j) := |y*sin(π*y*i)/(π*y*i)|
a := 1 - n*ny, 1 - n*ny + ny .. (1 + n*ny)
b := 2 - n*ny, 2 - n*ny + ny .. (2 + n*ny)
S(a) := |y*sin(π*y*a)/(π*y*a)|
S(b) := |y*sin(π*y*a)/(π*y*a)|
t := 4 - n*ny, 4 - n*ny + ny .. (4 + n*ny)
e := 3 - n*ny, 3 - n*ny + ny .. (3 + n*ny)
S(e) := |y*sin(π*y*e)/(π*y*e)|
S(t) := |y*sin(π*y*t)/(π*y*t)|
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